// COMSOL Multiphysics 5.4.0.225 model "ring_decel_osterwalder.mph"
// Outline of the model tree

Parameters
  VV = 8000
  ph = 0

Geometry
  geom1 "Geometry 1" (2D axisymmetric, length unit mm)
    c1: Circle "Ring Electrode" | pos = {2.3, -9}; r = 0.3
    r1: Rectangle "Simulation Bound" | pos = {0, -12}; size = {8, 24}
    arr1: Array | input = c1; size = {1, 13}; fullsize = {1, 13}; displ = {0, 1.5}
    fin: Finalize "Form Union"

Materials
  mat1: Common "Air" on all domains
    def "Basic"
      thermalexpansioncoefficient = alpha_p(pA,T)
      molarmass = 0.02897
      bulkviscosity = muB(T)
      relpermeability = 1
      relpermittivity = 1
      dynamicviscosity = eta(T)
      ratioofspecificheat = 1.4
      electricconductivity = 0[S/m]
      heatcapacity = Cp(T)
      density = rho(pA,T)
      thermalconductivity = k(T)
      soundspeed = cs(T)
      eta: Piecewise | arg = T; pieces = {200.0, 1600.0, -8.38278E-7+8.35717342E-8*T^1-7.69429583E-11*T^2+4.6437266E-14*T^3-1.06585607E-17*T^4}; argunit = K; fununit = Pa*s
      Cp: Piecewise | arg = T; pieces = {200.0, 1600.0, 1047.63657-0.372589265*T^1+9.45304214E-4*T^2-6.02409443E-7*T^3+1.2858961E-10*T^4}; argunit = K; fununit = J/(kg*K)
      rho: Analytic | expr = pA*0.02897/R_const[K*mol/J]/T; args = {pA, T}; dermethod = manual; argders = {{pA, d(pA*0.02897/R_const/T,pA)}, {T, d(pA*0.02897/R_const/T,T)}}; argunit = Pa,K; fununit = kg/m^3
      k: Piecewise | arg = T; pieces = {200.0, 1600.0, -0.00227583562+1.15480022E-4*T^1-7.90252856E-8*T^2+4.11702505E-11*T^3-7.43864331E-15*T^4}; argunit = K; fununit = W/(m*K)
      cs: Analytic | expr = sqrt(1.4*R_const[K*mol/J]/0.02897*T); args = T; dermethod = manual; argunit = K; fununit = m/s
      an1: Analytic | funcname = alpha_p; expr = -1/rho(pA,T)*d(rho(pA,T),T); args = {pA, T}; argunit = Pa,K; fununit = 1/K
      an2: Analytic "Analytic 2a" | funcname = muB; expr = 0.6*eta(T); args = T; argunit = K; fununit = Pa*s
    RefractiveIndex
      n = 1
      ki = 0
    NonlinearModel
      BA = (def.gamma+1)/2

Physics
  es: Electrostatics on all domains
    dependent variable V
    ccn1: ChargeConservation (default)
    axi1: AxialSymmetry (default)
    zc1: ZeroCharge (default)
    init1: init "Initial Values 1" (default)
    pot1: ElectricPotential on boundaries 5, 6, 21, 22, 31, 32, 47, 48 | V0 = VV*sin(ph)
    pot2: ElectricPotential on boundaries 7, 8, 23, 24, 33, 34, 49, 50 | V0 = VV*sin(ph+pi/4)
    pot3: ElectricPotential on boundaries 9, 10, 25, 26, 35, 36, 51, 52 | V0 = VV*sin(ph+pi/2)
    pot4: ElectricPotential on boundaries 11, 12, 27, 28, 37, 38, 53, 54 | V0 = VV*sin(ph+3*pi/4)
    pot5: ElectricPotential on boundaries 13, 14, 29, 30, 39, 40, 55, 56 | V0 = VV*sin(ph+pi)
    pot6: ElectricPotential on boundaries 15, 16, 41, 42 | V0 = VV*sin(ph+5*pi/4)
    pot7: ElectricPotential on boundaries 17, 18, 43, 44 | V0 = VV*sin(ph+6*pi/4)
    pot8: ElectricPotential on boundaries 19, 20, 45, 46 | V0 = VV*sin(ph+7*pi/4)

Mesh
  mesh1 "Mesh 1"
    size: MeshSizeDefault | hmax = 0.2; hmin = 0.02; custom = on
    ftri1: FreeTri "Free Triangular 1" on entire geometry

Studies
  std1 "Study 1"
    param: Parametric "Parametric Sweep" | pname = ph; plistarr = range(0,pi/24,pi/4)
    stat: Stationary

Solver configurations
  sol1 "Solution 1" (study std1)
    v1: Variables "Dependent Variables 1"
    s1: Stationary "Stationary Solver 1"
      dDef: Direct
      p1: Parametric | pname = ph; plistarr = range(0,pi/24,pi/4); pcontinuationmode = no
      fc1: FullyCoupled | linsolver = dDef

Datasets
  dset1: Solution | solution = sol1
  rev1: Revolve2D "Revolution 2D 1" | data = dset1

Plots
  pg1: PlotGroup2D "Electric Potential (es)" | data = dset1
    surf1: Surface | expr = es.normE; unit = kV/cm

Exports
  data1: Data "Check Trap Min"
    data = dset1
    expr = es.normE
    filename = /data/ye/dare4983/COMSOL Big/Decel COMSOL Models/ringdecel_efftrap5.dat
    location = grid
    gridx2 = range(0,0.1,2)
    gridy2 = range(-3-1.25,0.1,3-1.25)